*Heading
** Job name: Job-1 Model name: Model-1
** Generated by: Abaqus/CAE 2023
*Preprint, echo=NO, model=NO, history=NO, contact=NO
**
** PARTS
**
*Part, name=Flexure-Outer-Cut
*End Part
**
*Part, name=Inner-Surface
*End Part
**
*Part, name=Outer-Surface
*End Part
**
**
** ASSEMBLY
**
*Assembly, name=Assembly
**
*Instance, name="Inner Surface", part=Inner-Surface
*Node
      1,          -1., -0.288450003,        0.375
      2,          -1., -0.288450003,           0.
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*Element, type=R3D4
 1,  1, 11, 71, 36
 2, 11,  2, 12, 71
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*Node
    100,           0.,           0.,           0.
*Nset, nset="Inner Surface-RefPt_", internal
100,
*Elset, elset="Inner Surface", generate
  1,  66,   1
*End Instance
**
*Instance, name="Outer Surface", part=Outer-Surface
*Node
      1,   2.30626512,  -0.96495688,           0.
      2,   2.30626512,  -0.96495688,        0.375
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*Element, type=R3D4
 1,  1,  2, 15, 56
 2, 56, 15, 16, 55
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*Node
     97,           0.,           0.,       0.1875
*Nset, nset="Outer Surface-RefPt_", internal
97,
*Elset, elset="Outer Surface", generate
  1,  48,   1
*End Instance
**
*Instance, name=Flexure-Outer-Cut-1, part=Flexure-Outer-Cut
*Node
      1,  -2.30626512,   0.96495688,        0.375
      2,  -2.41481471,  0.647046983,        0.375
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*Element, type=C3D8R
 1,  61, 193,   2,   1,  62, 209,   6,   7
 2, 191,  22,  21, 193, 207, 101, 102, 209
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*Nset, nset=Set-1, generate
   1,  278,    1
*Elset, elset=Set-1, generate
  1,  91,   1
** Section: Section-1
*Solid Section, elset=Set-1, material=Material-1
,
*End Instance
**
*Nset, nset=Boundary-Fix, instance="Inner Surface"
  5,  6,  7,  8, 37, 38
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*Elset, elset=Boundary-Fix, instance="Inner Surface", generate
 27,  52,   1
*Nset, nset=Moment-Node, instance="Outer Surface"
 97,
*Nset, nset=Set-3, instance="Inner Surface"
  1,  2,  3,  4,  5,  6
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*Elset, elset=Set-3, instance="Inner Surface", generate
  1,  52,   1
*Elset, elset=_innerLeftSurface_SPOS, internal, instance="Inner Surface", generate
 53,  58,   1
*Surface, type=ELEMENT, name=innerLeftSurface
_innerLeftSurface_SPOS, SPOS
*Elset, elset=_innerLeftSurfaceD_S6, internal, instance=Flexure-Outer-Cut-1
 61,
*Elset, elset=_innerLeftSurfaceD_S5, internal, instance=Flexure-Outer-Cut-1
 62,
*Surface, type=ELEMENT, name=innerLeftSurfaceD
_innerLeftSurfaceD_S6, S6
_innerLeftSurfaceD_S5, S5
*Elset, elset=_innerRightSurface_SPOS, internal, instance="Inner Surface", generate
 59,  66,   1
*Surface, type=ELEMENT, name=innerRightSurface
_innerRightSurface_SPOS, SPOS
*Elset, elset=_innerRightSurfaceD_S5, internal, instance=Flexure-Outer-Cut-1
 22, 23
*Surface, type=ELEMENT, name=innerRightSurfaceD
_innerRightSurfaceD_S5, S5
*Elset, elset=_outerLeftSurface_SPOS, internal, instance="Outer Surface"
 47, 48
*Surface, type=ELEMENT, name=outerLeftSurface
_outerLeftSurface_SPOS, SPOS
*Elset, elset=_outerLeftSurfaceD_S5, internal, instance=Flexure-Outer-Cut-1
 1, 3
*Surface, type=ELEMENT, name=outerLeftSurfaceD
_outerLeftSurfaceD_S5, S5
*Elset, elset=_outerRightSurface_SPOS, internal, instance="Outer Surface"
 45, 46
*Surface, type=ELEMENT, name=outerRightSurface
_outerRightSurface_SPOS, SPOS
*Elset, elset=_outerRightSurfaceD_S4, internal, instance=Flexure-Outer-Cut-1
 39,
*Elset, elset=_outerRightSurfaceD_S6, internal, instance=Flexure-Outer-Cut-1
 45,
*Surface, type=ELEMENT, name=outerRightSurfaceD
_outerRightSurfaceD_S4, S4
_outerRightSurfaceD_S6, S6
*Rigid Body, ref node="Inner Surface"."Inner Surface-RefPt_", elset="Inner Surface"."Inner Surface"
*Rigid Body, ref node="Outer Surface"."Outer Surface-RefPt_", elset="Outer Surface"."Outer Surface"
** Constraint: innerLeftTie
*Tie, name=innerLeftTie, adjust=yes
innerRightSurfaceD, innerRightSurface
** Constraint: innerRightTie
*Tie, name=innerRightTie, adjust=yes
innerRightSurfaceD, innerRightSurface
** Constraint: outerLeftTie
*Tie, name=outerLeftTie, adjust=yes
innerRightSurfaceD, innerRightSurface
** Constraint: outerRightTie
*Tie, name=outerRightTie, adjust=yes
innerRightSurfaceD, innerRightSurface
*End Assembly
**
** MATERIALS
**
*Material, name=Material-1
*Elastic
 2.75e+07, 0.33
*Plastic
309700.,0.
**
** BOUNDARY CONDITIONS
**
** Name: Inner-Encastre Type: Symmetry/Antisymmetry/Encastre
*Boundary
Set-3, ENCASTRE
** ----------------------------------------------------------------
**
** STEP: Step-1
**
*Step, name=Step-1, nlgeom=NO
*Static
1., 1., 1e-05, 1.
**
** LOADS
**
** Name: Load-1   Type: Moment
*Cload
Moment-Node, 6, 514.
**
** OUTPUT REQUESTS
**
*Restart, write, frequency=0
**
** FIELD OUTPUT: F-Output-1
**
*Output, field, variable=PRESELECT
**
** HISTORY OUTPUT: H-Output-1
**
*Output, history, variable=PRESELECT
*End Step
